Clear

New Circuit.150 Bus1=150.1.2.3 BasekV=2.401777 pu=1.732 Angle=0.0 Phases=3 Z1=[0.001, 0.001] Z0=[0.001, 0.001] Enabled=True
redirect WireData.dss
redirect LineCodes.dss
redirect SwitchCodes.dss
redirect Transformers.dss
redirect Capacitors.dss
redirect Lines.dss
redirect Loads.dss
redirect Switches.dss
redirect RegControllers.dss
New EnergyMeter.SourceMeter element=Line.150-149_0
Set Voltagebases=[0.48, 2.401777, 4.1568]
calcv
Solve
redirect BusCoords.dss
